<?xml version="1.0" ?>
<propeller name="155x12-4" version="1.1">
  <ixx unit="KG*M2">0.000771</ixx>
  <diameter unit="IN">15.5</diameter>
  <numblades>4</numblades>
  <constspeed>0</constspeed>
  <table name="C_THRUST" type="internal">
    <tableData>
      0.0000	0.1870
      0.0508	0.1846
      0.1016	0.1817
      0.1524	0.1780
      0.2033	0.1736
      0.2541	0.1681
      0.3049	0.1616
      0.3557	0.1538
      0.4065	0.1448
      0.4573	0.1347
      0.5082	0.1235
      0.5590	0.1116
      0.6098	0.0989
      0.6606	0.0855
      0.7114	0.0717
      0.7622	0.0573
      0.8131	0.0426
      0.8639	0.0275
      0.9147	0.0123
      0.9655	-0.0030
    </tableData>
  </table>
  <table name="C_POWER" type="internal">
    <tableData>
      0.0000	0.0928
      0.0508	0.0955
      0.1016	0.0981
      0.1524	0.1004
      0.2033	0.1023
      0.2541	0.1036
      0.3049	0.1041
      0.3557	0.1036
      0.4065	0.1019
      0.4573	0.0991
      0.5082	0.0950
      0.5590	0.0899
      0.6098	0.0836
      0.6606	0.0763
      0.7114	0.0678
      0.7622	0.0584
      0.8131	0.0480
      0.8639	0.0368
      0.9147	0.0247
      0.9655	0.0127
    </tableData>
  </table>
</propeller>
