<?xml version="1.0" ?>
<propeller name="1575x13-3" version="1.1">
  <ixx unit="KG*M2">0.000878</ixx>
  <diameter unit="IN">15.76</diameter>
  <numblades>3</numblades>
  <constspeed>0</constspeed>
  <table name="C_THRUST" type="internal">
    <tableData>
      0.0000	0.1742
      0.0534	0.1722
      0.1068	0.1698
      0.1603	0.1667
      0.2137	0.1629
      0.2671	0.1582
      0.3205	0.1525
      0.3739	0.1456
      0.4274	0.1374
      0.4808	0.1280
      0.5342	0.1175
      0.5876	0.1061
      0.6411	0.0940
      0.6945	0.0813
      0.7479	0.0680
      0.8013	0.0544
      0.8547	0.0405
      0.9082	0.0263
      0.9616	0.0120
      1.0150	-0.0024
    </tableData>
  </table>
  <table name="C_POWER" type="internal">
    <tableData>
      0.0000	0.0832
      0.0534	0.0861
      0.1068	0.0889
      0.1603	0.0917
      0.2137	0.0941
      0.2671	0.0961
      0.3205	0.0974
      0.3739	0.0978
      0.4274	0.0971
      0.4808	0.0951
      0.5342	0.0917
      0.5876	0.0871
      0.6411	0.0813
      0.6945	0.0743
      0.7479	0.0661
      0.8013	0.0569
      0.8547	0.0465
      0.9082	0.0351
      0.9616	0.0227
      1.0150	0.0100
    </tableData>
  </table>
</propeller>
