<?xml version="1.0" ?>
<propeller name="15x4W" version="1.1">
  <ixx unit="KG*M2">0.000601</ixx>
  <diameter unit="IN">15.0</diameter>
  <numblades>2</numblades>
  <constspeed>0</constspeed>
  <table name="C_THRUST" type="internal">
    <tableData>
      0.0000	0.0713
      0.0236	0.0685
      0.0472	0.0655
      0.0708	0.0624
      0.0944	0.0592
      0.1180	0.0559
      0.1416	0.0524
      0.1652	0.0487
      0.1888	0.0449
      0.2124	0.0410
      0.2361	0.0370
      0.2597	0.0328
      0.2833	0.0285
      0.3069	0.0241
      0.3305	0.0196
      0.3541	0.0151
      0.3777	0.0104
      0.4013	0.0058
      0.4249	0.0012
      0.4485	nan
    </tableData>
  </table>
  <table name="C_POWER" type="internal">
    <tableData>
      0.0000	0.0226
      0.0236	0.0224
      0.0472	0.0222
      0.0708	0.0220
      0.0944	0.0216
      0.1180	0.0212
      0.1416	0.0207
      0.1652	0.0202
      0.1888	0.0196
      0.2124	0.0189
      0.2361	0.0181
      0.2597	0.0173
      0.2833	0.0163
      0.3069	0.0152
      0.3305	0.0140
      0.3541	0.0127
      0.3777	0.0113
      0.4013	0.0097
      0.4249	0.0096
      0.4485	nan
    </tableData>
  </table>
</propeller>
