<?xml version="1.0" ?>
<propeller name="20x15(WCAR-T6)" version="1.1">
  <ixx unit="KG*M2">0.001267</ixx>
  <diameter unit="IN">20.0</diameter>
  <numblades>2</numblades>
  <constspeed>0</constspeed>
  <table name="C_THRUST" type="internal">
    <tableData>
      0.0000	0.1055
      0.0479	0.1047
      0.0957	0.1037
      0.1436	0.1023
      0.1914	0.1003
      0.2393	0.0976
      0.2871	0.0940
      0.3350	0.0894
      0.3829	0.0840
      0.4307	0.0778
      0.4786	0.0710
      0.5264	0.0638
      0.5743	0.0561
      0.6222	0.0480
      0.6700	0.0398
      0.7179	0.0314
      0.7657	0.0229
      0.8136	0.0144
      0.8614	0.0060
      0.9093	-0.0027
    </tableData>
  </table>
  <table name="C_POWER" type="internal">
    <tableData>
      0.0000	0.0426
      0.0479	0.0444
      0.0957	0.0463
      0.1436	0.0481
      0.1914	0.0498
      0.2393	0.0511
      0.2871	0.0519
      0.3350	0.0520
      0.3829	0.0512
      0.4307	0.0498
      0.4786	0.0477
      0.5264	0.0449
      0.5743	0.0415
      0.6222	0.0375
      0.6700	0.0330
      0.7179	0.0279
      0.7657	0.0223
      0.8136	0.0164
      0.8614	0.0101
      0.9093	0.0029
    </tableData>
  </table>
</propeller>
